<!-- top -->
<!-- comment at the beginning of file -->
<!-- test -->

<!-- test test -->

<Lems>
	<!-- This LEMS file is going to describe a simulation -->
	<Include file="NeuroMLCoreDimensions.xml"/>
	<!-- comments, comments, comments -->
</Lems>

<!-- Yet another comment -->

<!-- comm -->
<!-- bottom -->
